Compile IEEE13Nodeckt.dss

! Force Regulator Transformer taps
Transformer.Reg1.Taps=[1.0 1.0625]
Transformer.Reg2.Taps=[1.0 1.0500]
Transformer.Reg3.Taps=[1.0 1.06875]

Set Controlmode=OFF  ! prevents further tap changes

Solve
